*Heading
** Job name: CT_specimen_CPE4 Model name: CT_specimen
** Generated by: Abaqus/CAE 2020
*Preprint, echo=NO, model=NO, history=NO, contact=NO
**
** PARTS
**
*Part, name=CT_specimen
*End Part
**
**
** ASSEMBLY
**
*Assembly, name=Assembly
**
*Instance, name=CT_specimen-1, part=CT_specimen
*Node
      1,          -3.,           0.
      2,          -3.,          -3.
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*Element, type=CPE4
  1, 12671,    35,  1124, 12670
  2,    35,    36,  1125,  1124
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*Nset, nset=D
     7,     8,     9,    10,    11,    12
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*Elset, elset=D, generate
 801,  980,    1
*Nset, nset=C
     1,     2,     3,     4,     5,     6
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*Elset, elset=C
     1,     2,     3,     4,     5,     6
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** Section: sec_plastic
*Solid Section, elset=C, material=steel
25.,
** Section: sec_elastic
*Solid Section, elset=D, material=steel_elastic
25.,
*End Instance
**
*Nset, nset=A, instance=CT_specimen-1
     1,     2,     3,     4,     5,     6
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*Elset, elset=A, instance=CT_specimen-1
    1,    2,    3,    4,    5,    6
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*Nset, nset=B, instance=CT_specimen-1
     1,     2,     3,     4,     5,     6
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*Elset, elset=B, instance=CT_specimen-1
    1,    2,    3,    4,    5,    6
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*Nset, nset=C, instance=CT_specimen-1
     1,     2,     3,     4,     5,     6
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*Elset, elset=C, instance=CT_specimen-1
     1,     2,     3,     4,     5,     6
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*Nset, nset=FAR_FIELD, instance=CT_specimen-1
     1,     2,     3,     4,     5,     6
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*Elset, elset=FAR_FIELD, instance=CT_specimen-1
     1,     2,     3,     4,     5,     6
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*Nset, nset=BC, instance=CT_specimen-1
  7, 14
*Nset, nset=BC_LOWER, instance=CT_specimen-1
 7,
*Nset, nset=BC_UPPER, instance=CT_specimen-1
 14,
*Nset, nset=CRACK_TIP, instance=CT_specimen-1
 4,
*Nset, nset=ALL_NODES, generate, instance=CT_specimen-1
 1, 12725
*End Assembly
**
** MATERIALS
**
*Material, name=steel
*Elastic
200000., 0.3
*Plastic
    270.,         0.
 273.052, 0.00109256
 300.462, 0.00837633
 329.014,  0.0198685
 367.845,  0.0392919
 394.113,  0.0580678
 415.812,   0.082347
 440.557,   0.116176
 456.166,   0.145311
 472.155,   0.181244
 578.368,   0.399433
   1460.,         3.
*Material, name=steel_elastic
*Elastic
200000., 0.3
**
** BOUNDARY CONDITIONS
**
** Name: fix Type: Displacement/Rotation
*Boundary
BC_LOWER, 1, 1
BC_LOWER, 2, 2
** ----------------------------------------------------------------
**
** STEP: Loading
**
*Step, name=Loading, nlgeom=YES
*Static
1e-02, 1., 1e-05, 1e-02.
**
** BOUNDARY CONDITIONS
**
** Name: Load Type: Displacement/Rotation
*Boundary
BC_UPPER, 2, 2, 0.5
**
** OUTPUT REQUESTS
**
*Restart, write, frequency=0
**
** FIELD OUTPUT: F-Output-1
**
*Output, field, time interval=0.01
*Node Output
CF, RF, U
*Element Output, directions=YES
ENER, LE, PE, PEEQ, PEMAG, S
**
** HISTORY OUTPUT: H-Output-4
**
*Output, history
*Node Output, nset=BC
RF1, RF2, RF3, U1, U2, RM1, RM2, RM3
**
** HISTORY OUTPUT: H-Output-1
**
*Output, history, variable=PRESELECT
**
** HISTORY OUTPUT: J_NEAR
**
*Contour Integral, crack name=J_NEAR, contours=57, crack tip nodes
CRACK_TIP, CRACK_TIP, 1., 0., 0.
**
** HISTORY OUTPUT: J_FAR
**
*Contour Integral, crack name=J_FAR, contours=1, crack tip nodes
FAR_FIELD, CRACK_TIP, 1., 0., 0.
*End Step
